## Приложение 3
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X_C := 0
L_DE := 0.961
L_DS4 := 0.481
β := 11.31 deg
L_ABmin := 1.2
Y_C := 0
L_CB := 0.424
L_KS5 := 2.30
σ := 45.42 deg
L_Almin := 0.3
X_K := 3
L_CA := 1.529
L_KSГ := 4.60
α := 90 deg
Y_K := 0
L_BL := 0.9
L_EF := 0.46
H_Lmax := 0.6
L_CD := 0.386
L_EK := 2.35
L_FK := 2.30
L_S5K := L_FK
f := 20 deg
φ_0 := 349.116 deg
φ := 0, 0.01 .. π/2
φ_1(φ) := φ_0 + φ
φ_1(f) = 369.116 deg
X_A := L_CA*cos(σ)
X_A = 1.07321
Y_A := L_CA*sin(σ)
Y_A = 1.08906
X_D(φ) := L_CD*cos(φ_1(φ))
X_D(f) = 0.381125
Y_D(φ) := L_CD*sin(φ_1(φ))
Y_D(f) = 0.0611554
L_DK(φ) := sqrt((X_D(φ) - X_K)^2 + (Y_D(φ) - Y_K)^2)
L_DK(f) = 2.61959
δ_1(φ) := asin(L_CD*sin(2*π - φ_1(φ))/L_DK(φ))
δ_1(f) = -1.33772 deg
δ_2(φ) := acos((L_DK(φ)^2 + L_EK^2 - L_DE^2)/(2*L_DK(φ)*L_EK))
δ_2(f) = 21.4255 deg
φ_5(φ) := π + δ_1(φ) + δ_2(φ)
φ_5(f) = 200.088 deg
X_B(φ) := L_CB*cos(φ_1(φ) + α)
X_B(f) = -0.0671759
Y_B(φ) := L_CB*sin(φ_1(φ) + α)
Y_B(f) = 0.418645
X_E(φ) := X_K + L_EK*cos(φ_5(φ))
X_E(f) = 0.792956
Y_E(φ) := Y_K + L_EK*sin(φ_5(φ))
Y_E(f) = -0.807128
φ_4(φ) := 2*π - acos((X_E(φ) - X_D(φ))/L_DE)
φ_4(f) = 295.375 deg
X_S4(φ) := X_D(φ) + L_DS4*cos(φ_4(φ))
X_S4(f) = 0.587254
Y_S4(φ) := Y_D(φ) + L_DS4*sin(φ_4(φ))
Y_S4(f) = -0.373438
X_F(φ) := X_K + L_FK*cos(φ_5(φ) + β)
X_F(f) = 1.03679
Y_F(φ) := Y_K + L_FK*sin(φ_5(φ) + β)
Y_F(f) = -1.19824
X_S5(φ) := X_F(φ)
X_S5(f) = 1.03679
Y_S5(φ) := Y_F(φ)
Y_S5(f) = -1.19824
X_SГ(φ) := X_K + L_KSГ*cos(φ_5(φ) + β)
X_SГ(f) = -0.926428
Y_SГ(φ) := Y_K + L_KSГ*sin(φ_5(φ) + β)
Y_SГ(f) = -2.39649
L_AB(φ) := sqrt((X_A - X_B(φ))^2 + (Y_A - Y_B(φ))^2)
L_AB(f) = 1.32285
φ_2(φ) := acos((X_A - X_B(φ))/L_AB(φ))
φ_2(f) = 30.4507 deg
X_L(φ) := X_B(φ) + L_BL*cos(φ_2(φ))
X_L(f) = 0.708683
Y_L(φ) := Y_B(φ) + L_BL*sin(φ_2(φ))
Y_L(f) = 0.874761
φ_3(φ) := π + acos((X_A - X_B(φ))/L_AB(φ))
φ_3(f) = 210.451 deg
L_AL(φ) := sqrt((X_L(φ) - X_A)^2 + (Y_L(φ) - Y_A)^2)
L_AL(f) = 0.422855
φ := 0, 0.01 .. π/2
ff := 0 deg
X_1(φ) := transpose([X_A, X_L(φ), X_B(φ), X_C, X_D(φ), X_S4(φ), X_E(φ), X_F(φ), X_E(φ), X_K, X_F(φ), X_SГ(φ)])
Y_1(φ) := transpose([Y_A, Y_L(φ), Y_B(φ), Y_C, Y_D(φ), Y_S4(φ), Y_E(φ), Y_F(φ), Y_E(φ), Y_K, Y_F(φ), Y_SГ(φ)])
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# Определение аналогов скоростей
V_qLX(φ) := d/dφ(X_L(φ))
V_qLX(f) = -0.365457
V_qLY(φ) := d/dφ(Y_L(φ))
V_qLY(f) = -0.157649
V_qBX(φ) := d/dφ(X_B(φ))
V_qBX(f) = -0.418645
V_qBY(φ) := d/dφ(Y_B(φ))
V_qBY(f) = -0.0671759
V_qDX(φ) := d/dφ(X_D(φ))
V_qDX(f) = -0.0611554
V_qDY(φ) := d/dφ(Y_D(φ))
V_qDY(f) = 0.381125
V_qS4X(φ) := d/dφ(X_S4(φ))
V_qS4X(f) = -0.0945207
V_qS4Y(φ) := d/dφ(Y_S4(φ))
V_qS4Y(f) = 0.365299
V_qEX(φ) := d/dφ(X_E(φ))
V_qEX(f) = -0.127817
V_qEY(φ) := d/dφ(Y_E(φ))
V_qEY(f) = 0.349507
V_qFX(φ) := d/dφ(X_F(φ))
V_qFX(f) = -0.189754
V_qFY(φ) := d/dφ(Y_F(φ))
V_qFY(f) = 0.310894
V_qSГX(φ) := d/dφ(X_SГ(φ))
V_qSГX(f) = -0.379507
V_qSГY(φ) := d/dφ(Y_SГ(φ))
V_qSГY(f) = 0.621788
V_qAL(φ) := d/dφ(L_AL(φ))
V_qAL(f) = 0.394944
V_qS5X(φ) := d/dφ(X_S5(φ))
V_qS5X(f) = -0.189754
V_qS5Y(φ) := d/dφ(Y_S5(φ))
V_qS5Y(f) = 0.310894
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ω_q2(φ) := d/dφ(φ_2(φ))
ω_q2(f) = -0.11661
ω_q3(φ) := d/dφ(φ_3(φ))
ω_q3(f) = -0.11661
ω_q4(φ) := d/dφ(φ_4(φ))
ω_q4(f) = -0.0767735
ω_q5(φ) := d/dφ(φ_5(φ))
ω_q5(f) = -0.15836
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# Определение аналогов ускорений
a_qLX(φ) := d^2/dφ^2(X_L(φ))
a_qLX(f) = -0.111308
a_qLY(φ) := d^2/dφ^2(Y_L(φ))
a_qLY(f) = -0.139189
a_qBX(φ) := d^2/dφ^2(X_B(φ))
a_qBX(f) = 0.0671759
a_qBY(φ) := d^2/dφ^2(Y_B(φ))
a_qBY(f) = -0.418645
a_qDX(φ) := d^2/dφ^2(X_D(φ))
a_qDX(f) = -0.381125
a_qDY(φ) := d^2/dφ^2(Y_D(φ))
a_qDY(f) = -0.0611554
a_qS4X(φ) := d^2/dφ^2(X_S4(φ))
a_qS4X(f) = -0.183235
a_qS4Y(φ) := d^2/dφ^2(Y_S4(φ))
a_qS4Y(f) = 0.0358424
a_qEX(φ) := d^2/dφ^2(X_E(φ))
a_qEX(f) = 0.0142434
a_qEY(φ) := d^2/dφ^2(Y_E(φ))
a_qEY(f) = 0.132639
a_qFX(φ) := d^2/dφ^2(X_F(φ))
a_qFX(f) = -0.0117896
a_qFY(φ) := d^2/dφ^2(Y_F(φ))
a_qFY(f) = 0.13003
a_qSГX(φ) := d^2/dφ^2(X_SГ(φ))
a_qSГX(f) = -0.0235793
a_qSГY(φ) := d^2/dφ^2(Y_SГ(φ))
a_qSГY(f) = 0.260059
a_qAL(φ) := d^2/dφ^2(L_AL(φ))
a_qAL(f) = 0.172245
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ε_q2(φ) := d^2/dφ^2(φ_2(φ))
ε_q2(f) = 0.368183
ε_q3(φ) := d^2/dφ^2(φ_3(φ))
ε_q3(f) = 0.368183
ε_q4(φ) := d^2/dφ^2(φ_4(φ))
ε_q4(f) = 0.45814
ε_q5(φ) := d^2/dφ^2(φ_5(φ))
ε_q5(f) = -0.0509268
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# Определение приведенных моментов инерции
m_4 := 450
m_5 := 7500
m_Г := 2000
J_S4 := 40
J_S5 := 13250
V_qSГ(φ) := sqrt(V_qSГX(φ)^2 + V_qSГY(φ)^2)
V_qSГ(f) = 0.728455
V_qS4(φ) := sqrt(V_qS4X(φ)^2 + V_qS4Y(φ)^2)
V_qS4(f) = 0.37733
J_Гпр(φ) := m_Г*V_qSГ(φ)^2
J_Гпр(f) = 1061.29
J_4пр(φ) := m_4*(V_qS4(φ)^2) + J_S4*ω_q4(φ)^2
J_4пр(f) = 64.3058
J_5пр(φ) := (J_S5 + m_5*L_S5K^2)*ω_q5(φ)^2
J_5пр(f) = 1327.24
J_Σпр(φ) := J_Гпр(φ) + J_4пр(φ) + J_5пр(φ)
J_Σпр(f) = 2452.84
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# Определени приведенных моментов.
ψ := 297.3 deg  # ψ-Угол между вертикалю и осью Х
g := 9.81
G_4X := m_4*g*cos(ψ)
G_4X = 2024.71
G_4Y := m_4*g*sin(ψ)
G_4Y = -3922.8
G_ГX := m_Г*g*cos(ψ)
G_ГX = 8998.7
G_ГY := m_Г*g*sin(ψ)
G_ГY = -17434.7
G_5X := m_5*g*cos(ψ)
G_5X = 33745.1
G_5Y := m_5*g*sin(ψ)
G_5Y = -65380
M_G5пр(φ) := G_5X*V_qS5X(φ) + G_5Y*V_qS5Y(φ)
M_G4пр(φ) := G_4X*V_qS4X(φ) + G_4Y*V_qS4Y(φ)
M_GГпр(φ) := G_ГX*V_qSГX(φ) + G_ГY*V_qSГY(φ)
# Определение значения силы F2
F_2Н := |1.8*(M_GГпр(0 deg) + M_G5пр(0 deg) + M_G4пр(0 deg))/V_qAL(0 deg)|
F_2Н = 205329
F_2К := |(M_GГпр(90 deg) + M_G5пр(90 deg) + M_G4пр(90 deg))/V_qAL(90 deg)|
F_2К = 129041
A_GГ(φ) := integral(M_GГпр(φ), φ = 0 .. φ)
A_GГ(90 deg) = -22015.6
A_G5(φ) := integral(M_G5пр(φ), φ = 0 .. φ)
A_G5(90 deg) = -41279.2
A_G4(φ) := integral(M_G4пр(φ), φ = 0 .. φ)
A_G4(90 deg) = -2437.15
F_2зв := (2/H_Lmax)*|A_G5(90 deg) + A_GГ(90 deg) + A_G4(90 deg)| - (F_2Н + F_2К)/2
## H.Lmax - максимальный ход поршня = 0.6м
F_2зв = 51921.2
## F2зв это F2*
H_L(φ) := L_AL(φ) - L_Almin
## В результате нескольих итераций подбираем коэффициент для приведенного момента силы F2н равный 1.80 и HL для точки перегиба равное 0.300312
f_2 := transpose([F_2Н, F_2зв, F_2К])
f_1 := transpose([0, 0.300312, 0.6])
F_2(φ) := linterp(f_1, f_2, H_L(φ))
F_2(f) = 142571
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M_F2пр(φ) := F_2(φ)*V_qAL(φ)
A_F2(φ) := integral(M_F2пр(φ), φ = 0 .. φ)
A_F2(90 deg) = 65732.2
M_Σпр(φ) := M_G5пр(φ) + M_GГпр(φ) + M_G4пр(φ) + M_F2пр(φ)
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# Определение закона движения динамической модели
A_Σ(φ) := integral(M_Σпр(φ), φ = 0 .. φ)
A_Σ(90 deg) = 0.0491351
ω(φ) := sqrt(2*A_Σ(φ)/J_Σпр(φ))
ω(90 deg) = 0.00690526
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## Проводится интерполяция для обеспечения возможности расчета сложных уравнений на домашних ПК
N := 200
i := 0 .. N
Δφ := π/(2*N)
δφ[i] := Δφ*i
Δω[i] := ω(δφ[i])
VS := cspline(δφ, Δω)
ω_m(φ) := interp(VS, δφ, Δω, φ)
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ξ_m(φ) := (M_Σпр(φ)/J_Σпр(φ)) - (ω_m(φ)^2/(2*J_Σпр(φ)))*(d/dφ(J_Σпр(φ)))
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φ := 0, 0.01 .. π/2
t(φ) := integral(1/ω_m(φ), φ = 0.001 .. φ)
t(90 deg) = 4.30609
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ω_m(f) = 2.53079
ξ_m(f) = 3.54672
F_2(f) = 142571
## Приложение 11
## Дополнительное задание
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## Определение работоспособности гидроцилиндра
F_2(0) = 205571
## Все расчеты проводятся при максимальном значении силы давления жидкости на поршень, потому что, если при максимальной силе работоспособность не нарушена, то очевидно, что при меньшей силе давления она так же не нарушится.
## 1) Определение диаметра поршня:
## Для определения диаметра поршня задаются номинальным давлением в гидроцилиндре Р согласно ГОСТ 6540-68 (СТ СЭВ 3936-82) Гидроцилиндры и пневмоцилиндры. Ряды основных параметров.
P_ном := 25  # мПа
D := sqrt(4*F_2(0)/(P_ном*π))
D = 102.321  # мм
## Выбирается диаметр поршня из ряда основных значений согласно ГОСТ 6540-68 (СТ СЭВ 3936-82) Гидроцилиндры и пневмоцилиндры. Ряды основных параметров.
D := 110  # мм
## 2) Диаметр штока гидроцилиндра определяется из условия непотери устойчивости при маскимальной нагрузке F2.
## Принимается, что шток поршня изготовлен из Стали 45, ее модуль упругости E=210000 мПа
E := 2.1*10^5  # мПа
## Определение критеческой силы (силы, при которой система теряет устойчиваость).
S_y := 2
## коэффициент запаса по усточивости
F_кр := S_y*F_2(0) = 411142  # н
## критическая сила
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## По формуле Эйлера
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## μ для данного способа закрепления равно 0.7
# L=L_BL
L_BL := 900  # мм
μ := 0.7
J_x := (μ*L_BL)^2*F_кр/(π^2*E)
J_x = 78732.5  # мм^4
d_min := nthroot((64*J_x/π), 4)
d_min = 35.5874  # мм
## Выбирается диаметр штока из ряда основных значений согласно ГОСТ 6540-68 (СТ СЭВ 3936-82) Гидроцилиндры и пневмоцилиндры. Ряды основных параметров. При условии, что d>=dmin
d := 40  # мм
## Определение расхода жидкости в гидроцилиндре
## Определение скорости поршня
V_AL(φ) := V_qAL(φ)*ω_m(φ)
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## Принимается объемный КПД гидроцилиндра η_об=0.99
η_об := 0.99
Q(φ) := π*(D*10^-3)^2*V_AL(φ)/(4*η_об)  # м^3/c
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## Определяется максимальный расход жидкости в гидроцилиндре
f := 0.5
φ_max := Maximize(Q, f)
φ_max = 0.538327
Q_max := Q(φ_max)
Q_max = 0.0105027  # м^3/c
Q_MAX := Q_max*3600
Q_MAX = 37.8097  # м^3/ч
# Подбор насоса
## Определяется закон изменения рабочего давления в насосе, для этого определяется закон изменения давления в гидроцилиндре
P(φ) := 4*F_2(φ)/(π*D^2)  # мПа
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## Определяется эффективная  мощность насоса
N(φ) := Q(φ)*(P(φ)*10^6)
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f := 0.5
φ_max := Maximize(N, f)
φ_max = 0.303015
N_max := N(φ_max) = 145383  # Вт
# Для обеспечения работоспособности гидроцилиндра необходим насос, максимальная мощность которого будет не менее 145.4 кВт, а подача которого будет не менее 38 м^3/ч.
# По данным параметрам выбирается центробежный насос 1Д 250-125 со следующими характеристиками:
# Характеристики насоса 1Д 250-125
# Подача = 252 м^3/ч
# Напор = 125 м
# Мощность = 160 кВт
# Частота вращения = 2900 об/мин
# Кпд насоса = не менее 73%
# Масса насоса = 176 кг
