# Приложение 10
φ := 0, 0.001 .. 2*π
θ_max := 35 deg
φ_p := 90 deg
e := 0.01
h_Q := 0.03
S_Q(φ) := 0.5*h_Q*(1 - cos(2*π*φ/φ_p))
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V_qQ(φ) := d/dφ(S_Q(φ))
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a_qQ(φ) := d/dφ(V_qQ(φ))
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# Значение R0 определяется графически путем построения диаграммы кинематических отношений и ОДР для прямого и реверсивного направления вращений кулачка в программе Компас. Получаем значение R0=0.087м. Выбираем ближайшее большее значение по ряду Ra40 R0=0.09м
r_0 := 0.090
S_0 := sqrt(r_0^2 - e^2)
# Выбирается значение радиуса ролика толкателя из условия отсутствия подрезания профиля кулачка: rp=(0.25...0.4)r0.
r_p := 0.3*r_0
r_p = 0.027
# Построение графика угла давления для проверки полученного решения
θ(φ) := atan((V_qQ(φ) - e)/(S_0 + S_Q(φ)))
θ_max = 0.610865
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# Угол давления не превышает допустимого значения. Решение верно.
