# Приложение 7
# Геометрия проектируемо передачи определяется параметрами исходного контура инструмента и его смещениями при нарезании колес передачи. Поэтому при проектировании прежде всего необходимо задать исходный производящий контур инструмента и выбрать расчетные смещения.
# При нарезании прямозубой передачи пармаетры исходного производящего контура заданы следующие:
α := 18 deg  # Угол главного профиля
h_a := 1.25  # Коэффициент высоты головки зуба h*a
c := 0.25  # Коэффициент радиального зазора c*
# Параметры проектируемой ЭЗП:
m := 12  # Нормальный модуль зубьев
p := π*m  # нормальный шаг
z_8 := 13  # Число зубьев шестерни 8
p = 37.6991
z_9 := 19  # Число зубьев колеса 9
β := 0 deg  # Угол наклона линии зуба
# Для нарезания косозубых колес используется тот же стандартный инструмент, что и для прямозубых, но его располагают под наклоном к плоскости заготовки. Реечный исходный производящий контур в данном случае имеет следующие параметры, зависящие от угла наклона линии зубьев, которые определяются следующим образом:
α_t := atan(tan(α)/cos(β))
α_t = 18 deg  # Угол профиля
p_t := p/cos(β)
p_t = 37.6991  # Шаг
m_t := m/cos(β)
m_t = 12  # Торцевой модуль
h_at := h_a*cos(β) = 1.25
h_at = 1.25
c_t := c*cos(β)
c_t = 0.25
# Определение радиусов делительных окружностей r_8 и r_9
r_8 := m_t*z_8/2
r_8 = 78
r_9 := m_t*z_9/2
r_9 = 114
# Определение радиусов основных окружностей r_b8и r_b9
r_b8 := r_8*cos(α_t)
r_b8 = 74.1824
r_b9 := r_9*cos(α_t)
r_b9 = 108.42
# Определение минимальное число зубьев нулевого колеса, нарезаемых без подрезания
z_tmin := 2*h_at/sin(α_t)^2
z_tmin = 26.1803
# Определение коэффициентов наименьшего смещения исходного производящего контура X_8min и X_9min ,обспечивающих отсутсвие подрезания профиля зуба
x_t8min := h_at*(z_tmin - z_8)/z_tmin
x_t8min = 0.629305
x_t9min := h_at*(z_tmin - z_9)/z_tmin
x_t9min = 0.342831
# Далее проводится итерационный расчет X_8 и Х_9, при котором Х_8варьируется от 0 до 1.5 с шагом 0.1, а Х_9 варьируется от 0 до 1 с шагом 0.25.
i := 0, 1 .. 15
j := 0, 1 .. 4
x_8(i) := i*0.1
x_9(j) := j*0.25
x_Σ(i, j) := x_8(i) + x_9(j)
z_Σ := z_8 + z_9
z_Σ = 32
# Определение угла зацепления передачи
invα_t := tan(α_t) - α_t
α_t = 18 deg
invα_tw(i, j) := invα_t + 2*x_Σ(i, j)*tan(α_t)/z_Σ
ψ := 0
Given
invα_tw(i, j) == tan(ψ) - ψ
F(i, j) := Find(ψ)
α_tw(i, j) := F(i, j)
α_twdeg(i, j) := F(i, j)*180/π
# Определение коэффициента воспринимаемого смещения y:
y(i, j) := ((z_8 + z_9)/2)*((cos(α_t)/cos(α_tw(i, j))) - 1)
# Определение коэффициента уравнительного смещения Δy:
Δy(i, j) := x_Σ(i, j) - y(i, j)
# Определение радиусов начальных окружностей r_w8 и r_w9 и межосевого расстояния a_w
r_w8(i, j) := (m_t*z_8/2)*cos(α_t)/cos(α_tw(i, j))
r_w9(i, j) := (m_t*z_9/2)*cos(α_t)/cos(α_tw(i, j))
a_w(i, j) := r_w8(i, j) + r_w9(i, j)
# Определение исполнительных размеров зубчатых колес
# Определение радиусов окружностей вершин r_a8 и r_a9
r_a8(i, j) := (m_t*z_8/2) + x_8(i)*m_t + h_at*m_t - Δy(i, j)*m_t
r_a9(i, j) := (m_t*z_9/2) + x_9(j)*m_t + h_at*m_t - Δy(i, j)*m_t
# Определение радиусов окружностей впадин r_f8 и r_f8
r_f8(i) := (m_t*z_8/2) + x_8(i)*m_t - h_at*m_t - c*m_t
r_f9(j) := (m_t*z_9/2) + x_9(j)*m_t - h_at*m_t - c*m_t
# Определенеие высоты зубьев колес h_8=h_9=h
h(i, j) := c*m_t + 2*h_at*m_t - Δy(i, j)*m_t
# Определение толщин зубьев колес по делительным окружностям S_8 и S_9
s_8(i) := (π*m_t/2) + 2*m_t*(x_8(i)*tan(α_t))
s_9(j) := (π*m_t/2) + 2*m_t*(x_9(j)*tan(α_t))
# Определение углов профиля на окружности вершин зубьев колес
α_a8(i, j) := acos(r_b8/r_a8(i, j))
α_a9(i, j) := acos(r_b9/r_a9(i, j))
invα_a8(i, j) := tan(α_a8(i, j)) - α_a8(i, j)
invα_a9(i, j) := tan(α_a9(i, j)) - α_a9(i, j)
# Определение толщин зубьев колес по окружностям вершин S_a8 и S_a9
S_a8(i, j) := (m_t*cos(α_t)/cos(α_a8(i, j)))*((π/2) + 2*x_8(i)*tan(α_t) - z_8*(invα_a8(i, j) - invα_t))
S_a9(i, j) := (m_t*cos(α_t)/cos(α_a9(i, j)))*((π/2) + 2*x_9(j)*tan(α_t) - z_9*(invα_a9(i, j) - invα_t))
# Определение толщины зуба исходного производящего контура по делительной прямой равную ширине впадины S_0t =e_0t
s_0t := π*m_t/2
s_0t = 18.8496
e_0t := s_0t
e_0t = 18.8496
# Определение шага
p_t := π*m_t
p_t = 37.6991
# Определение радиуса скругления основания ножки зуба
ρ_ft := c*m_t/(1 - sin(α_t))
ρ_ft = 4.34164
# Шаг по хорде делительной окружности шестерни и колеса
p_8hor := m_t*z_8*sin(180 deg/z_8)
p_8hor = 37.3332
p_9hor := m_t*z_9*sin(180 deg/z_9)
p_9hor = 37.5276
# Определение качественных показателей зубчатой передачи
# Коэффициент скольжения зубьев
# В точке B_1
λ_1(i, j) := (z_9*(tan(α_a9(i, j)) - tan(α_tw(i, j)))/((z_8 + z_9)*tan(α_tw(i, j)) - z_9*tan(α_a9(i, j))))*(1 + z_8/z_9)
# В точке B_2
λ_2(i, j) := (z_8*(tan(α_a8(i, j)) - tan(α_tw(i, j)))/((z_8 + z_9)*tan(α_tw(i, j)) - z_8*tan(α_a8(i, j))))*(1 + z_8/z_9)
# Коэффициент удельного давления
θ_p(i, j) := 2*(z_8 + z_9)/(z_8*z_9*tan(α_tw(i, j))*cos(α_t))
# Коэффициент перекрытия
ε_α(i, j) := (z_8*tan(α_a8(i, j)) + z_9*tan(α_a9(i, j)) - (z_8 + z_9)*tan(α_tw(i, j)))/(2*π)
b := 1
ε_β := b*tan(β)/p_t
ε_γ(i, j) := ε_α(i, j) + ε_β
# Построение графиков качественных показателей
x_t9min = 0.342831
# Поскольку минимальное смещение обеспечивающее нарезание зубьев колеса 9 без подрезания x_t9min =0.343 мм, то справедливо рассматривать смещение Х9 начиная со значения 0.5 , то есть при j больше или равном 2. В противном случае нельзя получить колесо 9 без подрезания зубьев.
# Выбирается смещение для Х9 равное 1, поскольку при уменьшении смещения , уменьшается толщина зубьев шестерни 8 по окружности вершин. Толщина, получаемая при других смещениях выходит за рамки допускаемой толщины зубьев, что может привести к их сколу. Принимаем, что ХТО, проводимая над колесами - улучшение, тогда принимаем допускаемую толщину зуба [Sa]=(0.2-0.3)m, что в нашем случае при m=12 мм является 2.4-3.6 мм
j := 4
x_9(j) = 1
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# Результаты расчета зубчатой передачи
j = 4
r_8 = 78
r_9 = 114
s_0t = 18.8496
x_9(j) = 1
r_b8 = 74.1824
r_b9 = 108.42
e_0t = 18.8496
h_at = 1.25
x_t8min = 0.629305
x_t9min = 0.342831
c_t = 0.25
p_t = 37.6991
p_8hor = 37.3332
p_9hor = 37.5276
α_t = 0.314159
z_tmin = 26.1803
x_8(i) = [0; 0.1; 0.2; 0.3; 0.4; 0.5; 0.6; 0.7; 0.8; 0.9; 1; 1.1; 1.2; 1.3; 1.4; 1.5]
y(i, j) = [0.829126; 0.900801; 0.971196; 1.04041; 1.10854; 1.17565; 1.24183; 1.30711; 1.37157; 1.43525; 1.4982; 1.56045; 1.62204; 1.683; 1.74338; 1.80318]
Δy(i, j) = [0.170874; 0.199199; 0.228804; 0.259588; 0.29146; 0.324345; 0.358175; 0.392887; 0.428427; 0.464748; 0.501803; 0.539553; 0.577962; 0.616995; 0.656623; 0.696816]
r_w8(i, j) = [82.042; 82.3914; 82.7346; 83.072; 83.4041; 83.7313; 84.0539; 84.3722; 84.6864; 84.9969; 85.3037; 85.6072; 85.9074; 86.2046; 86.499; 86.7905]
r_w9(i, j) = [119.908; 120.418; 120.92; 121.413; 121.898; 122.377; 122.848; 123.313; 123.772; 124.226; 124.675; 125.118; 125.557; 125.991; 126.422; 126.848]
a_w(i, j) = [201.95; 202.81; 203.654; 204.485; 205.302; 206.108; 206.902; 207.685; 208.459; 209.223; 209.978; 210.725; 211.464; 212.196; 212.921; 213.638]
r_a8(i, j) = [90.9495; 91.8096; 92.6544; 93.4849; 94.3025; 95.1079; 95.9019; 96.6854; 97.4589; 98.223; 98.9784; 99.7254; 100.464; 101.196; 101.921; 102.638]
r_a9(i, j) = [138.95; 138.61; 138.254; 137.885; 137.502; 137.108; 136.702; 136.285; 135.859; 135.423; 134.978; 134.525; 134.064; 133.596; 133.121; 132.638]
x_8(i) = [0; 0.1; 0.2; 0.3; 0.4; 0.5; 0.6; 0.7; 0.8; 0.9; 1; 1.1; 1.2; 1.3; 1.4; 1.5]
r_f8(i) = [60; 61.2; 62.4; 63.6; 64.8; 66; 67.2; 68.4; 69.6; 70.8; 72; 73.2; 74.4; 75.6; 76.8; 78]
r_f9(j) = 108
s_8(i) = [18.8496; 19.6294; 20.4092; 21.189; 21.9688; 22.7486; 23.5284; 24.3082; 25.088; 25.8678; 26.6476; 27.4274; 28.2072; 28.9871; 29.7669; 30.5467]
s_9(j) = 26.6476
h(i, j) = [30.9495; 30.6096; 30.2544; 29.8849; 29.5025; 29.1079; 28.7019; 28.2854; 27.8589; 27.423; 26.9784; 26.5254; 26.0645; 25.5961; 25.1205; 24.6382]
S_a8(i, j) = [7.13476; 6.87701; 6.61272; 6.34243; 6.06654; 5.78545; 5.4995; 5.20897; 4.91412; 4.61522; 4.31245; 4.00601; 3.69611; 3.38284; 3.06643; 2.74693]
S_a9(i, j) = [0.494562; 1.03588; 1.59655; 2.17404; 2.76603; 3.37049; 3.98558; 4.6096; 5.24103; 5.87848; 6.52062; 7.16628; 7.81435; 8.46375; 9.11356; 9.7628]
x_8(i) = [0; 0.1; 0.2; 0.3; 0.4; 0.5; 0.6; 0.7; 0.8; 0.9; 1; 1.1; 1.2; 1.3; 1.4; 1.5]
α_twdeg(i, j) = [25.2842; 25.7938; 26.2813; 26.7487; 27.1979; 27.6304; 28.0476; 28.4506; 28.8405; 29.2183; 29.5847; 29.9405; 30.2864; 30.6229; 30.9507; 31.2702]
α_a8(i, j) = [0.616955; 0.630042; 0.64244; 0.654221; 0.665443; 0.676159; 0.686414; 0.696245; 0.705687; 0.714769; 0.723518; 0.731958; 0.74011; 0.747992; 0.755621; 0.763014]
α_a9(i, j) = [0.675672; 0.672607; 0.669374; 0.665981; 0.662433; 0.658734; 0.654889; 0.650898; 0.646765; 0.642491; 0.638076; 0.633521; 0.628826; 0.623989; 0.61901; 0.613887]
λ_1(i, j) = [-92.7874; 30.2347; 12.378; 7.51585; 5.24369; 3.92487; 3.0619; 2.45222; 1.99787; 1.64565; 1.36419; 1.1338; 0.941489; 0.778324; 0.637978; 0.515835]
λ_2(i, j) = [0.880206; 0.899426; 0.917474; 0.934506; 0.950649; 0.96601; 0.980676; 0.994723; 1.00822; 1.02121; 1.03374; 1.04587; 1.05761; 1.06901; 1.0801; 1.09088]
θ_p(i, j) = [0.576771; 0.563733; 0.551702; 0.540549; 0.530166; 0.520464; 0.511368; 0.502813; 0.494744; 0.487116; 0.479886; 0.47302; 0.466486; 0.460257; 0.454308; 0.448617]
ε_γ(i, j) = [1.48567; 1.45592; 1.42596; 1.3958; 1.36542; 1.33483; 1.30402; 1.27301; 1.24177; 1.2103; 1.17861; 1.14669; 1.11452; 1.08211; 1.04944; 1.0165]
# Выбирается смещение Х8 таким образом, чтобы λ_1 и λ_2 были приблизительно равны друг другу, это достигается при смещениие X8=1.1
i := 11
ε_γ(i, j) = 1.14669
x_8(i) = 1.1
x_9(j) = 1
r_w8(i, j) = 85.6072
S_a8(i, j) = 4.00601
r_b8 = 74.1824
p_9hor = 37.5276
r_w9(i, j) = 125.118
S_a9(i, j) = 7.16628
r_8 = 78
r_b9 = 108.42
α_twdeg(i, j) = 29.9405
θ_p(i, j) = 0.47302
r_a8(i, j) = 99.7254
r_9 = 114
α_a8(i, j) = 0.731958
λ_1(i, j) = 1.1338
r_f8(i) = 73.2
r_a9(i, j) = 134.525
α_a9(i, j) = 0.633521
λ_2(i, j) = 1.04587
s_8(i) = 27.4274
r_f9(j) = 108
a_w(i, j) = 210.725
p_8hor = 37.3332
h(i, j) = 26.5254
h(i, j) = 26.5254
y(i, j) = 1.56045
s_9(j) = 26.6476
Δy(i, j) = 0.539553
ρ_ft = 4.34164
S_a9(i, j) = 7.16628
